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xn := -5
xk := 5
FF(x1) := sin(x1)
c := 0
N := 1000
i := 0 .. N
h := (xk - xn)/if(N == 1, 1, N - 1) = 0.01001
x[i] := h*i + xn
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err1 := 10^-1
Z(f) :=
    j ← 0
    for i ∈ 0 .. N - 1
        if |f(x[i])| ≤ err1 and f(x[i])*f(x[i + 1]) ≤ 0
            k[j] ← x[i]
            j ← j + 1
    k
Zz := [-3; 1; 3]
Z1 := Z(FF) = [-3.14815; -0.00500501; 3.13814]
j := 0 .. last(Z1)
last(Z1) = 2
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err := 10^-6 = 1e-6
DF(x1) := d/dx1(FF(x1)) → cos(x1)
MN(f, a) :=
    while |f(a)| > err
        a ← a - f(a)/DF(a)
    a
RES(f, Z) :=
    zx ← 0
    for i ∈ 0 .. last(Z)
        K[zx] ← MN(f, Z[i])
        zx ← zx + 1
    K
XX := RES(FF, Z1)
# конечные ИКСЫ
XX = [-3.14159; 4.17923e-8; 3.14159]
Z1 = [-3.14815; -0.00500501; 3.13814]
RES(FF, Zz) = [-3.14159; 2.92357e-13; 3.14159]
Zz = [-3; 1; 3]
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