ORIGIN := 1
a := [0, 6, -9, 2, -7; 3, -4, 5, -3, 4; 0, 1, 3, -2, 18; 7, 2, -8, 1, 10; 6, 5, -4, 3, -2]
c := [90; 12; 51; 32; 87]
gauss(a, c) :=
    n ← last(c)
    for i ∈ 1 .. n - 1
        if a[i, i] == 0
            t ← c[i]
            c[i] ← c[i + 1]
            c[i + 1] ← t
            for k ∈ 1 .. n
                t ← a[i, k]
                a[i, k] ← a[i + 1, k]
                a[i + 1, k] ← t
        for k ∈ (i + 1) .. n
            p ← a[k, i]/a[i, i]
            for j ∈ (i + 1) .. n
                a[k, j] ← a[k, j] - p*a[i, j]
            c[k] ← c[k] - p*c[i]
    for i ∈ 1 .. n
        x[i] ← 0
    for i ∈ n, n - 1 .. 1
        s ← 0
        for j ∈ i .. n
            s ← s + a[i, j]*x[j]
        x[i] ← (c[i] - s)/a[i, i]
    x
# Метод Гаусса. Напомним, что данный метод содержит два этапа: прямой ход, в процессе которого матрица системы приводится к треугольному виду, и обратный ход – решение системы уравнений с треугольной матрицей. Пример программы-функции для метода Гаусса приведен ниже.
#
# Функция gauss содержит два параметра: a – матрица системы уравнений и с – вектор свободных членов. Алгоритм функции содержит два основных цикла по переменной i. Первый цикл реализует прямой ход, а второй – обратный ход метода. В теле первого цикла предусмотрена процедура перестановки уравнений в случае, если ведущий элемент оказывается равным нулю. В качестве результата функция возвращает вектор x – вектор решения системы. Для правильной работы программы значение встроенной переменной ORIGIN должно быть равно единице.
#
# Для иллюстрации работы функции решим следующую систему:
gauss(a, c) = [8.22559; 26.6748; 3.16046; -29.3171; -2.4328]
a*gauss(a, c) = [90; 12; 51; 32; 87]
c = [90; 12; 51; 32; 87]
