x := [6.5; 4.5; 8.5; 9.5; 10.5; 11.5]
y := [3.423; 4.041; 5.451; 4.353; 6.353; 3.353]
n := length(x) - 1
L(z) := sum(y[j]*product(if(j ≠ k, (z - x[k])/(x[j] - x[k]), 1), k = 0 .. n), j = 0 .. n)
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