In := 0.00001
Ik := 5
kvo := 1000
c := 0
i := 0 .. kvo - 1
h := (Ik - In)/(kvo - 1)
Y[i] := In + i*h
k1n := 0
k1k := 0.4
kvok := 80
ik := 0 .. kvok - 1
hk1 := (k1k - k1n)/if(kvok == 1, 1, kvok - 1)
FRAME := 100
k1[ik] := k1n + ik*hk1
k2 := 0.001 + 0.01*FRAME
w[ik, i] := (c^2*k1[ik]^2 + 1)*Y[i]^2/(k2*k1[ik] + Y[i])^2
q[ik, i] := Y[i]*(k2^2 + c^2*Y[i]^2)/(k2*k1[ik] + Y[i])^2
e[ik, i] := Y[i]*((1 + (k2 + c^2*k1[ik]*Y[i])/((k2*k1[ik]) + Y[i]) + k2*(1 + c^2*k1[ik]^2)*Y[i]/(k2*k1[ik] + Y[i])^2)^2 + 4*c^2*Y[i]^2/(k2*k1[ik] + Y[i])^2)
KK := kvok/2
Xx[ik, i] := k1[ik]
Yy[ik, i] := e[ik, i]
G[ik, i] := Y[i]
X_line := transpose(Xx)[:, KK]
Y_line := transpose(Yy)[:, KK]
Zn_line := transpose(q)[:, KK]
ZN_line := transpose(w)[:, KK]
ZY_line := transpose(G)[:, KK]
k1n =  # no stored result
k1k =  # no stored result
FRAME =  # no stored result
k2 =  # no stored result
# [component: inputs (Xx, Yy, q), (X_line, Y_line, Zn_line)]
# [component: inputs (Xx, Yy, w), (X_line, Y_line, ZN_line)]
# [component: inputs (Xx, Yy, G), (X_line, Y_line, ZY_line)]
