f(x) := cos(x)
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a := 0
b := 5
h := 0.001  # количество отрезков интервала [a;b]
n := (b - a)/h = 5000
I := integral(f(x), x = a .. b) = -0.958924
P :=
    s1 ← 0
    s2 ← 0
    for i ∈ 0 .. n
        s1 ← s1 + f(a + i*h) if mod(i, 2) ≠ 0
        s2 ← s2 + f(a + i*h) otherwise
    (((f(a) - f(b))/2 + 2*s1 + s2)/3)*2*h
# Возвращает остаток от деления х на у (х модулю у). Результат имеет тот же знак, что и х.
P = -0.958258
