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eps := 0.0001
xprev1 := 1
xprev2 := -4
xprev3 := 4
xnext1 := xprev1 - tan(xprev1)
xnext2 := xprev2 - tan(xprev2)
xnext3 := xprev3 - tan(xprev3)
S1 :=
    while |xnext1 - xprev1| ≥ eps
        xprev1 ← xnext1
        xnext1 ← xprev1 - tan(xprev1)
    xnext1
S2 :=
    while |xnext2 - xprev2| ≥ eps
        xprev2 ← xnext2
        xnext2 ← xprev2 - tan(xprev2)
    xnext2
S3 :=
    while |xnext3 - xprev3| ≥ eps
        xprev3 ← xnext3
        xnext3 ← xprev3 - tan(xprev3)
    xnext3
S3 = 3.14159
S2 = -3.14159
S1 = 2.92357e-13
