A := [0, 6, -9, 2, -7; 3, -4, 5, -3, 4; 0, 1, 3, -2, 18; 7, 2, -8, 1, 10; 6, 5, -4, 3, -2]
B := [90; 12; 51; 32; 87]
X[0] := 0
N := 4
S :=
    for k ∈ 0 .. N - 1
        if A[k, k] == 0
            i ← k
            while A[i, k] == 0
                i ← i + 1
            for j ∈ 0 .. N
                Atemp ← A[k, j]
                A[k, j] ← A[i, j]
                A[i, j] ← Atemp
            Btemp ← B[k]
            B[k] ← B[i]
            B[i] ← Btemp
        for j ∈ k + 1 .. N
            A[k, j] ← A[k, j]/A[k, k]
        B[k] ← B[k]/A[k, k]
        A[k, k] ← 1
        for i ∈ k + 1 .. N
            for j ∈ k + 1 .. N
                A[i, j] ← A[i, j] - A[k, j]*A[i, k]
            B[i] ← B[i] - B[k]*A[i, k]
            A[i, k] ← 0
    X[N] ← B[N]/A[N, N]
    v ← N - 1
    while v ≥ 0
        X[v] ← B[v]
        for u ∈ v + 1 .. N
            X[v] ← X[v] - A[v, u]*X[u]
        v ← v - 1
    X
S = [8.22559; 26.6748; 3.16046; -29.3171; -2.4328]
