a := 1
b := 2
N := 10
h := (b - a)/N
Z[0] := 1
Y[0] := 0
X[0] := a
S :=
    for i ∈ 0 .. N - 1
        u ← Z[i] + h*(1 - X[i]*Z[i])/X[i]^2
        v ← Y[i] + h*Z[i]
        X[i + 1] ← X[i] + h
        Z[i + 1] ← Z[i] + h/2*((1 - X[i]*Z[i])/X[i]^2 + (1 - X[i + 1]*u)/X[i + 1]^2)
        Y[i + 1] ← Y[i] + h/2*(Z[i] + u)
    Y
S1 :=
    for i ∈ 0 .. N - 1
        k0 ← Z[i]
        l0 ← (1 - X[i]*Z[i])/X[i]^2
        k1 ← Z[i] + h*l0/2
        l1 ← (1 - (X[i] + h/2)*(Z[i] + h*l0/2))/(X[i] + h/2)^2
        k2 ← Z[i] + h*l1/2
        l2 ← (1 - (X[i] + h/2)*(Z[i] + h*l1/2))/(X[i] + h/2)^2
        k3 ← Z[i] + h*l2
        l3 ← (1 - (X[i] + h)*(Z[i] + h*l2))/(X[i] + h)^2
        Y[i + 1] ← Y[i] + h/6*(k0 + 2*k1 + 2*k2 + k3)
        Z[i + 1] ← Z[i] + h/6*(l0 + 2*l1 + 2*l2 + l3)
        X[i + 1] ← X[i] + h
    Y
S = [0; 0.1; 0.199192; 0.297106; 0.39346; 0.488092; 0.580919; 0.671907; 0.761057; 0.848391; 0.933946]
S1 = [0; 0.0998524; 0.198943; 0.296782; 0.39308; 0.487667; 0.580456; 0.671412; 0.760534; 0.847843; 0.933374]
