f(x) := sin(x)  # Метод Ньютона
a := -5
b := 5
df(x) := d/dx(f(x)) → cos(x)
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eps := 0.0001
xprev1 := 1
xprev2 := -4
xprev3 := 4
xnext1 := xprev1 - f(xprev1)/df(xprev1)
xnext2 := xprev2 - f(xprev2)/df(xprev2)
xnext3 := xprev3 - f(xprev3)/df(xprev3)
S1 :=
    while |xnext1 - xprev1| ≥ eps
        xprev1 ← xnext1
        xnext1 ← xprev1 - f(xprev1)/df(xprev1)
    xnext1
S2 :=
    while |xnext2 - xprev2| ≥ eps
        xprev2 ← xnext2
        xnext2 ← xprev2 - f(xprev2)/df(xprev2)
    xnext2
S3 :=
    while |xnext3 - xprev3| ≥ eps
        xprev3 ← xnext3
        xnext3 ← xprev3 - f(xprev3)/df(xprev3)
    xnext3
S2 = -3.14159
S3 = 3.14159
S1 = 2.92357e-13
