Y := [3.423; 4.041; 5.451; 4.353; 6.353; 3.353]
X := [6.5; 7.5; 8.5; 9.5; 10.5; 11.5]
Δx := 0.2
x := 4
L[0] := 0
S :=
    i ← 0
    while x ≥ 4 and x ≤ 12
        L[i] ← 0
        for k ∈ 0 .. 5
            P ← Y[k]
            for j ∈ 0 .. 5
                P ← P*(x - X[j])/(X[k] - X[j]) if j ≠ k
            L[i] ← L[i] + P
        i ← i + 1
        x ← x + Δx
    L
S = [
    372.588; 292.473; 226.35; 172.377; 128.875; 94.3228; 67.3439; 46.7044; 31.3038; 20.1679
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]
