DY[0, 0] := 3.423
DY[1, 0] := 4.041
X := [6.5; 7.5; 8.5; 9.5; 10.5; 11.5]
DY[2, 0] := 5.451
DY[3, 0] := 4.353
M := 5
DY[4, 0] := 6.353
N := 3
DY[5, 0] := 3.353
S :=
    for j ∈ 1 .. N
        for i ∈ 0 .. M - j
            DY[i, j] ← DY[i + 1, j - 1] - DY[i, j - 1]
    DY
S = [
    3.423, 0.618, 0.792, -3.3;
    4.041, 1.41, -2.508, 5.606;
    5.451, -1.098, 3.098, -8.098;
    4.353, 2, -5, 0;
    6.353, -3, 0, 0;
    3.353, 0, 0, 0
]
Δx := 0.2
x := 4
h := 1
S1 :=
    k ← 0
    while x ≤ 12
        if x ≤ 7
            F[k] ← S[0, 0]
            t ← (x - X[0])/h
            for j ∈ 1 .. N
                P ← S[0, j]
                for i ∈ 1 .. j
                    P ← P*(t - i + 1)/i
                F[k] ← F[k] + P
        if x ≤ 8 and x > 7
            F[k] ← S[1, 0]
            t ← (x - X[1])/h
            for j ∈ 1 .. N
                P ← S[1, j]
                for i ∈ 1 .. j
                    P ← P*(t - i + 1)/i
                F[k] ← F[k] + P
        if x > 8
            F[k] ← S[2, 0]
            t ← (x - X[2])/h
            for j ∈ 1 .. N
                P ← S[2, j]
                for i ∈ 1 .. j
                    P ← P*(t - i + 1)/i
                F[k] ← F[k] + P
        k ← k + 1
        x ← x + Δx
    F
S1 = [
    26.9992; 22.9576; 19.3832; 16.2497; 13.5307; 11.1997; 9.23049; 7.59651; 6.27141; 5.22879
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]
