N := 10
h := 0.5
i := 0 .. N
X[i] := i*h
Y[0] := 0
S :=
    F ← h/3*cos(X[0])
    for i ∈ 1 .. N - 1
        F ← F + 4*h*cos(X[i])/3 if mod(i, 2) == 1
        F ← F + 2*h*cos(X[i])/3 if mod(i, 2) == 0
    F ← F + h/3*cos(X[N])
    F
S = -0.959267
